*Heading
** Job name: Door-01 Model name: Forced-temperature
** Generated by: Abaqus/CAE 6.9-2
*Preprint, echo=NO, model=NO, history=NO, contact=NO
**
** PARTS
**
*Part, name=Door
*Node
      1,           0.,  0.449999988,           2.
      2,           0.,          0.5,           2.
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*Element, type=DCC3D8
  1,  43,  44,  46,  45,   1,   2,   4,   3
  2,  45,  46,  48,  47,   3,   4,   6,   5
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*Nset, nset=_PickedSet8, internal, generate
1, 462, 1
*Elset, elset=_PickedSet8, internal, generate
1, 200, 1
*Nset, nset=Set-Temperature, generate
   2,  462,    2
*Nset, nset=Set-Boundary, generate
1, 462, 1
*Solid Section, elset=_PickedSet8, material=STEEL
,
*End Part
**
** ASSEMBLY
**
*Assembly, name=Assembly
**
*Instance, name=Door-1, part=Door
*End Instance
**
*End Assembly
**
** MATERIALS
**
**   Define material properties
*Material, name=STEEL
*Conductivity
0.016,
*Density
7.85e-06,
*Elastic
207000., 0.3
*Expansion
1.38e-05,
*Specific Heat
500.,
**
** PREDEFINED FIELDS
**
** Name: Predefined Field-1   Type: Temperature
*Initial Conditions, type=TEMPERATURE
Door-1.Set-Boundary, 20.
** ----------------------------------------------------------------
**
** STEP: Step-1
**
*Step, name=Step-1, inc=100000
*Heat Transfer, end=PERIOD, deltmx=5.
0.01, 100., 1e-05, 50.,
**
** OUTPUT REQUESTS
**
*Restart, write, frequency=0
**
** FIELD OUTPUT: F-Output-1
**
*Output, field
*Node Output
NT,
*Output, history, frequency=0
*End Step
