*Heading
** Job name: TC3_m1A Model name: TC3_m1A
** Generated by: Abaqus/CAE 6.11-1
*Preprint, echo=NO, model=NO, history=NO, contact=NO
**
** PARTS
**
*Part, name=Wall_with_hole
*Node
1,  0.400000006,  0.600000024,           0.
2,           0.,  0.200000003,           0.
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*Element, type=DC3D8
1,  194,   56,   55,  192,  964,  826,  825,  962
2,  265,  135,  134,  263, 1035,  905,  904, 1033
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*Nset, nset=_PickedSet2, internal, generate
1,  2310,     1
*Elset, elset=_PickedSet2, internal, generate
1,  1388,     1
*Nset, nset=Set-Temperature
1541, 1592, 1643, 1694, 1745, 1796
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*Elset, elset=Set-Temperature, generate
695,  1388,     1
** Section: concrete_wall
*Solid Section, elset=_PickedSet2, material=C30
,
*End Part
**
**
** ASSEMBLY
**
*Assembly, name=Assembly
**
*Instance, name=Wall_with_hole-1, part=Wall_with_hole
*End Instance
**
*Nset, nset=_PickedSet5, internal, instance=Wall_with_hole-1, generate
1,  2310,     1
*Elset, elset=_PickedSet5, internal, instance=Wall_with_hole-1, generate
1,  1388,     1
*End Assembly
**
** MATERIALS
**
*Material, name=C30
*Conductivity
1.33303,  20.
1.28045,  60.
1.2297, 100.
1.18077, 140.
1.13367, 180.
1.08839, 220.
1.04493, 260.
1.0033, 300.
0.963492, 340.
0.925508, 380.
0.889348, 420.
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0.5488,1200.
*Density
2300.,  20.
2300., 115.
2254., 200.
2185., 400.
2024.,1200.
*Expansion
0.,  20.
3.0224e-06,  40.
4.0504e-06,  60.
4.5896e-06,  80.
4.94e-06, 100.
5.2016e-06, 120.
5.41726e-06, 140.
5.6084e-06, 160.
5.78693e-06, 180.
5.96e-06, 200.
6.13215e-06, 220.
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1e-05,1200.
*Specific Heat
2000.,  20.
400.,  40.
75., 100.
3000., 130.
6000., 131.
6000., 140.
4500., 144.
1000., 150.
1000., 200.
1100., 400.
1100.,1200.
**
** PREDEFINED FIELDS
**
** Name: Initial_temperature   Type: Temperature
*Initial Conditions, type=TEMPERATURE
_PickedSet5, 20.
** ----------------------------------------------------------------
**
** STEP: heat_transf
**
*Step, name=heat_transf
*Heat Transfer, end=PERIOD, deltmx=100.
1., 600., 1e-05, 10.,
**
** OUTPUT REQUESTS
**
*Restart, write, frequency=0
**
** FIELD OUTPUT: F-Output-1
**
*Output, field, variable=PRESELECT
*Output, history, frequency=0
*End Step
