*Heading
** Job name: TC4_m1 Model name: TC4_m1
** Generated by: Abaqus/CAE 6.11-1
*Preprint, echo=NO, model=NO, history=NO, contact=NO
**
** PARTS
**
*Part, name=column
*Node
1,  0.144999996, -0.144999996,           0.
2, -0.144999996, -0.144999996,           0.
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*Element, type=DC3D8
1,   34,   24,   25,   35,   82,   72,   73,   83
2,   39,   19,   20,   40,   87,   67,   68,   88
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*Nset, nset=_PickedSet2, internal, generate
1,  2928,     1
*Elset, elset=_PickedSet2, internal, generate
1,  1440,     1
*Nset, nset=Set-Temperature
5,    6,    7,    8,   29,   30
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*Elset, elset=Set-Temperature, generate
1,  1440,     1
** Section: steel-section
*Solid Section, elset=_PickedSet2, material=steel
,
*End Part
**
**
** ASSEMBLY
**
*Assembly, name=Assembly
**
*Instance, name=column-1, part=column
*End Instance
**
*Nset, nset=_PickedSet4, internal, instance=column-1, generate
1,  2928,     1
*Elset, elset=_PickedSet4, internal, instance=column-1, generate
1,  1440,     1
*End Assembly
**
** MATERIALS
**
*Material, name=steel
*Conductivity
53.334,  20.
27.3, 800.
27.3,1200.
*Density
7850.,
*Expansion
0.,  20.
7.37e-06,  50.
9.98e-06, 100.
1.1e-05, 150.
1.16e-05, 200.
1.2e-05, 250.
1.24e-05, 300.
1.27e-05, 350.
1.3e-05, 400.
1.33e-05, 450.
1.35e-05, 500.
1.38e-05, 550.
1.4e-05, 600.
1.42e-05, 650.
1.45e-05, 700.
1.47e-05, 750.
1.28e-05, 860.
1.48e-05,1200.
*Specific Heat
439.802,  20.
487.62, 100.
529.76, 200.
564.74, 300.
605.88, 400.
666.5, 500.
760.217, 600.
767.578, 610.
776.186, 620.
786.389, 630.
798.673, 640.
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650.,1200.
**
** PREDEFINED FIELDS
**
** Name: Init-temp   Type: Temperature
*Initial Conditions, type=TEMPERATURE
_PickedSet4, 20.
** ----------------------------------------------------------------
**
** STEP: HT-analysis
**
*Step, name=HT-analysis, inc=1000000
*Heat Transfer, end=PERIOD, deltmx=100.
1., 600., 0.006, 5.,
**
** OUTPUT REQUESTS
**
*Restart, write, frequency=0
**
** FIELD OUTPUT: F-Output-1
**
*Output, field, variable=PRESELECT
*Output, history, frequency=0
*End Step
